// COMSOL Multiphysics 5.2.0.220 model "field.mph"
// Outline of the model tree

Geometry
  geom1 "MeshGeometry" (3D, length unit µm)
    imp1: Import
      filename = /localscratch/simulation_files/MicroMegas-Simulation/simulation/avalanche/geometry/geometry.step
      keepsolid = on
      knit = solid
      importtol = 1.0E-6
    fin: Finalize "Form Union"

Materials
  mat1: Common "Detector Gas" on all domains
    def "Basic"
      relpermittivity = 1

Physics
  es: Electrostatics on all domains
    dependent variable V
    ccn1: ChargeConservation (default)
    zc1: ZeroCharge (default)
    init1: init "Initial Values 1" (default)
    pot1: ElectricPotential "UpperBound" on boundaries 8 | V0 = -18
    pot2: ElectricPotential "Mesh" on boundaries 4, 6, 9, 10, 12, 14, 15, 17
    pot3: ElectricPotential "Readout" on boundaries 3 | V0 = 512

Mesh
  mesh1 "Mesh 1" (physics-controlled)
    size: MeshSizeDefault | hauto = 5

Studies
  std1 "Study 1"
    stat: Stationary

Solver configurations
  sol1 "Solution 1" (study std1)
    v1: Variables "Dependent Variables 1"
    s1: Stationary "Stationary Solver 1"
      fc1: FullyCoupled | linsolver = i1
      i1: Iterative | linsolver = cg
        mg1: Multigrid | prefun = amg

Datasets
  dset1: Solution | solution = sol1

Plots
  pg1: PlotGroup3D "Electric Potential (es)" | data = dset1
    slc1: Slice
      expr = V
      quickxmethod = number
      quickx = -5e-4
      quickxnumber = 2
      genpoints = {{0, 0, 0}, {1, 0, 0}, {0, 1, 0}}
      shift = -2e-06

Exports
  data1: Data
    data = dset1
    expr = {es.Ex, es.Ey, es.Ez, V}
    unit = {V/m, V/m, V/m, V}
    descr = {"Electric field, x component", "Electric field, y component", "Electric field, z component", Electric potential}
    filename = /localscratch/simulation_files/MicroMegas-Simulation/simulation/avalanche/field.txt
    location = grid
    gridx3 = range(-64,2,64)
    gridy3 = range(-64,2,64)
    gridz3 = range(-152,2,300)
    regulargridx3 = 10
    regulargridy3 = 10
    regulargridz3 = 40
    pattern = lagrange